# Given the following pile caps and information, determine the capacity of each type:
# Design Code References:
# Material Properties:
# Concrete Strength:
fc' := 3000 psi
# Reinforcing Steel Strength:
fs := 40 ksi
# Pile strength type 1:
f1 := 120 kip
# Type 2:
f2 := 170 kip
# Pile Caps Geometry:
# Type 1: | Type 2:
# Member | Thickness, t | Width, w
P - 1
# Loading: | Capacity is determined based on the pile and pile caps.
# Flexural Strength:
# Determine the moment in the footing at the critical section (due to column):
# Apply moment to determine the area required for flexural reinforcement:
# Satisfy minimum reinforcement requirements.
# Typical Reinforcement scheme for one and two-way square and rectangular footing:
# Based on pile type flexural strength, the pile capacity is then:
# Shear Strength:
# Shear strength evaluates wide-beam and two-way action in order to determine the member's required depth.
# Based on the member's geometry we then have:
# Wide-Beam Action Check:
# Given soil capacity: | Concrete capacity:
qs := □  # error: This placeholder is empty.
ϕVn := ϕ*(2*λ*bw*d*sqrt(fc'))  # error: This variable is undefined.
bw := □  # error: This placeholder is empty.
wt1 := □  # error: This placeholder is empty.
At1 := bw*wt1  # error: This variable is undefined.
Vu := qs*At1
# Two-way Action Check:
# This same procedure was applied to all types, and the resulting values for all piles is thus:
