# Given the following pile caps and information, determine the capacity of each type:
# Design Code References:
# ACI 318-11
# PCA 2008 & 2011
# Assumptions:
# Based on the typical pile cap, we have that a 3" clearance distance from top of the pile to the re-bar, and an additional 6"
# from the top of the pile to the bottom of the pile cap, for a total distance from bottom of pile cap (tension fiber) to re-bar of
# 9". In that way, the distance d called out above is then equal to d = t - 9".
# Lateral clearance,
lc := 2 in
# The width and length of the footing are based on the following scheme:
# pile diameter:
D := 12 in
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# Material Properties:
# Concrete Strength:
fc' := 3000
# Normal Weight Concrete:
λ := 1
# Reinforcing Steel Strength:
fs := 40000
# Shear factor:
ϕ := .75
# Pile strength type 1:
f1 := 120
# Type 2:
f2 := 170
# Pile Caps Geometry:
# Type 1: | Type 2:
# Member | Thickness, t | Width, w | Length, L | Longitudinal Reinf. | Transverse Reinf | d
P - 1
t := 27  # in
w := 30
L := w = 30  # 3 - #5
# 3 - #5
d := t - 9 = 18
# Pile Cap area, A
A := w*L = 900
p := f1 = 120
# Loading: | Capacity is determined based on the pile and pile caps.
# Flexural Strength:
# Given the pile cap's reinforcement:
Nb := 3
bdia := .625
As := Nb*π*bdia^2/4 = 0.920388  # in^2
# Given the area of steel, the reinforcement ratio is thus:
ρ := As/(w*d) = 0.00170442
# Satisfy minimum reinforcement requirements.
ρmin := .0014  # ACI 318-11 R.7.12.2
# Minimum spacing:
smin := 18  # in  # ACI 318-11 R.15.10.4
# Based on reinforcement ratio we obtain, Rn and Mu:
Rn := ρ*fs*(2 - ρ*fs/(0.85*fc')) = 134.531  # ksi
# Based on the existing reinforcement in the pile cap, the factored moment capacity of the pile cap is then:
Mu := ϕ*w*d^2*Rn = 980731  # kip.in
Muf := Mu/12 = 81727.6  # kip*ft
# Shear Strength:
# Shear strength evaluates wide-beam and two-way action in order to determine the member's required depth.
# Based on the member's geometry we then have:
# Circular pile area Ap = square area Apmod, the length of the square is thus:
l := 0.886*D = 0.886 ft
# Based on these, we can determine the tributary area for both shear methods to be checked, in a similar fashion to the figure below:
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# Wide-Beam Action Check:
# Given pile load capacity:
# Concrete capacity:
qs := p = 120
Vu := p = 120
bw := L = 30
wt1 := (w/2) - d = -3
bw := L = 30
wt1 := (w/2) - d = -3
ϕVn := ϕ*(2*λ*bw*d*sqrt(fc')) = 44365.5
At1 := bw*wt1 = -90
# Based on the negative value, we note that the tributary area for wide-beam action is outside of the area of this pile cap, hence it's action is considered negligible. Likewise, the number of piles that fall within the tributary area equal 0 = Vu.
Vu := qs*At1 = -10800
# In order to satisfy wide-beam action: ϕVn > Vu => OK.
# Two-way Action Check:
# The critical section for two way action has an length = square length + d/2
b2 := l + d/2  # error: This value has units: Unitless, but must have units: Length.
# The critical section perimeter is then:
bo := 4*b2
# The two-way action shear tributary area is then:
A2 := A - b2^2
# In this case, the number of piles within the tributary area is then:
Np := 0
Vu2 := Np*Vu = 0
# Plan dimension ration:
β := L/w = 1
# For interior column/pile:
αs := 40
# The following checks must then be made:
V1 := (2 + 4/β)*λ*sqrt(fc')*bo*d  # Eqn. 11-31
V2 := (2 + αs*d/bo)*λ*sqrt(fc')*bo*d  # Eqn. 11-32
V3 := 4*λ*bo*d*sqrt(fc')  # Eqn. 11-33
V := ϕ*min(V1, V2, V3)  # Controlling Value
# In order to satisfy punching shear action: ϕVn > Vu => OK.
# Additionally, in situations where more than one pile is encountered, punching shear should be checked for corner and edge columns.
# This same procedure was applied to all types, and the resulting values for all piles is thus:
