# Problem Dimensions:
# Material Properties:
fc := 4000  # psi
fs := 40  # ksi
fyt := fs = 40
# Assumptions:
# Depth and unit weight for brick wall and hollow concrete block;
# Unit Weight of concrete taken as most conservative value;
# Beam Dimensions:
b := 1  # ft
h := 2  # ft
cs := (1.5/12) = 0.125  # ft
d := h - cs = 1.875  # ft
# Wall Length
#
# Wall Height
#
# Brick Wall Depth
#
# Hollow Concrete Block Depth
#
# Bay Width
#
# Concrete Slab Thickness:
Lw := 23  # ft
Hw := 10  # ft  # Unit Weight:  # Loads:
Dw := .25  # ft
γb := .13  # kcf
DB := γb*Dw*Hw = 0.325
γcb := .135  # kcf
Db := .75  # ft
DCB := γcb*Dw*Hw = 0.3375
Bw := 13.5  # ft
st := 9/12 = 0.75  # ft
γc := .15  # kcf
DS := γc*st*Bw/2 = 0.759375
# Total Dead Load:
DL := DB + DCB + DS = 1.42188  # klf
DLu := 1.2*DL = 1.70625
# Live Load:
LL := 100  # psf
LLu := 1.4*LL*Bw/(2*10^3) = 0.945  # klf
# Total Load:
TL := DLu + LLu = 2.65125  # klf
TLl := TL*Lw = 60.9788  # kip
# Shear Load:
V := TLl/2 = 30.4894  # kip
# Critical section for shear, at distance d from the support:
Vdu := V - TL*d = 25.5183  # kip
# Concrete Shear Strength:
λ := 1
Vc := 2*λ*sqrt(fc)*b*d*144*10^-3 = 34.1526  # kip
# Shear Factor
ϕv := .75
Vn := ϕv*Vc = 25.6144  # kip
# By all means, without accounting for the existing stirrups, the concrete section in the member should suffice the member in terms of shear strength.
